sys rm -rf *bouf *mfl *dfl *sur *nam
read rae2822_penta.fbd
seta s1 se all
#div wall mult 2
#div in mult 2
#div out mult 2
#elty all tr3u 0.6
comp in do
comp out do
comp profil do
comp wall do
# mesh all
seto new
mesh all
swep s1 s2 tra 0 0 0.1 1 append
setc
elty all pe6f
setr s1 e new
comp s1 do
comp s2 do
comp in do
comp out do
comp profil do
comp wall do
# recover the right side of the volume
seta lines l all
comp lines do
comp lines do
setr s1 f lines
setr s2 f lines
setr in f lines
setr out f lines
setr profil f lines
setr wall f lines
send s1 abq surf
send s2 abq surf
send in abq surf
send out abq surf
send profil abq surf
send profil abq dflux 0.
send wall abq surf
send all abq
plot e all
view ed off
view elem on
